# Brechnung der Leistung:
c_pH2O := 75.291 J/(mol*K)
V := 0.5 m^3/hr = 0.000138889 m^3/s
ΔT := (80 - 10) K = 70 K
ρ := 1000 kg/m^3
M := 18*10^-3 kg/mol
m := ρ*V = 0.138889 kg/s
n := m/M = 7.71605 mol/s
W := c_pH2O*n*ΔT = 40666.4 W
# Brechnung der Rynoldsche Zahl:
r := 45 mm
μ_323k := 54.94*10^-5 Pa*s
A := π*r^2 = 0.00636173 m^2
u := V/A = 0.021832 m/s
Re := r*ρ*u/μ_323k = 1788.2  # <2300, deswegen soll laminare Strömung sein.
